<Lems>

    <!--

Parameters and setting used to generate this network:

    Cells:                         ['DB1', 'VD1', 'DD1', 'VB1']
    Cell stimulated:               ['DB1', 'VB1']
    Connection numbers overridden: None
    Connection numbers scaled:     None

    Known BioParameters:
        BioParameter: iaf_leak_reversal = -70mV (SRC: BlindGuess, certainty 0.1)
        BioParameter: iaf_reset = -70mV (SRC: BlindGuess, certainty 0.1)
        BioParameter: iaf_thresh = -50mV (SRC: BlindGuess, certainty 0.1)
        BioParameter: iaf_C = 0.2nF (SRC: BlindGuess, certainty 0.1)
        BioParameter: iaf_conductance = 0.01uS (SRC: BlindGuess, certainty 0.1)
        BioParameter: chem_exc_syn_gbase = 0.2nS (SRC: BlindGuess, certainty 0.1)
        BioParameter: chem_exc_syn_erev = 0mV (SRC: BlindGuess, certainty 0.1)
        BioParameter: chem_exc_syn_rise = 3ms (SRC: BlindGuess, certainty 0.1)
        BioParameter: chem_exc_syn_decay = 10ms (SRC: BlindGuess, certainty 0.1)
        BioParameter: chem_inh_syn_gbase = 0.2nS (SRC: BlindGuess, certainty 0.1)
        BioParameter: chem_inh_syn_erev = -80mV (SRC: BlindGuess, certainty 0.1)
        BioParameter: chem_inh_syn_rise = 3ms (SRC: BlindGuess, certainty 0.1)
        BioParameter: chem_inh_syn_decay = 10ms (SRC: BlindGuess, certainty 0.1)
        BioParameter: elec_syn_gbase = 0nS (SRC: BlindGuess, certainty 0.1)
        BioParameter: elec_syn_erev = 0mV (SRC: BlindGuess, certainty 0.1)
        BioParameter: elec_syn_rise = 3ms (SRC: BlindGuess, certainty 0.1)
        BioParameter: elec_syn_decay = 10ms (SRC: BlindGuess, certainty 0.1)
        BioParameter: unphysiological_offset_current = 0.5nA (SRC: KnownError, certainty 0)
        BioParameter: unphysiological_offset_current_dur = 1000ms (SRC: KnownError, certainty 0)

    -->

    <Target component="sim_c302_A_Locomotion" />

    <!-- Include core NeuroML2 ComponentType definitions -->

    <Include file="Cells.xml" />
    <Include file="Networks.xml" />
    <Include file="Simulation.xml" />

    <Include file="c302_A_Locomotion.nml" />

    <!-- End of NeuroML2 content -->

    <Simulation id="sim_c302_A_Locomotion" length="500ms" step="0.025ms" target="c302_A_Locomotion">

        <Display id="d0" title="c302_A_Locomotion: Membrane potential of a number of cells" timeScale="1ms" xmin="-50.0" xmax="550.0" ymin="-72" ymax="-48">

            <Line id="DB1" quantity="DB1/0/generic_iaf_cell/v" scale="1mV" color="#dc436c" timeScale="1ms" />
            <Line id="DD1" quantity="DD1/0/generic_iaf_cell/v" scale="1mV" color="#c900f3" timeScale="1ms" />
            <Line id="VB1" quantity="VB1/0/generic_iaf_cell/v" scale="1mV" color="#654ce8" timeScale="1ms" />
            <Line id="VD1" quantity="VD1/0/generic_iaf_cell/v" scale="1mV" color="#509a2d" timeScale="1ms" />

        </Display>

        <OutputFile id="of0" fileName="c302_A_Locomotion.dat">
            <OutputColumn id="DB1_v" quantity="DB1/0/generic_iaf_cell/v"/>
            <OutputColumn id="DD1_v" quantity="DD1/0/generic_iaf_cell/v"/>
            <OutputColumn id="VB1_v" quantity="VB1/0/generic_iaf_cell/v"/>
            <OutputColumn id="VD1_v" quantity="VD1/0/generic_iaf_cell/v"/>
        </OutputFile>

    </Simulation>

</Lems>
